<?xml version="1.0" encoding="UTF-8" standalone="yes"?>
<neuroml xmlns:xsi="http://www.w3.org/2001/XMLSchema-instance" xmlns="http://www.neuroml.org/schema/neuroml2" id="rods_small" xsi:schemaLocation="http://www.neuroml.org/schema/neuroml2 https://raw.githubusercontent.com/NeuroML/NeuroML2/development/Schemas/NeuroML2/NeuroML_v2beta5.xsd">

    <ionChannelHH species="k" conductance="10pS" id="kx_rod">
        <notes>Single Channel description adapted from Y. Kamiyama, T. O'Sura, S. Usui (1996): Ionic current model of the vertebrate rod photoreceptor, Vision Research.</notes>
        <gateHHrates instances="1" id="n">
            <forwardRate type="HHExpRate" rate="0.66per_s" midpoint="-49.9mV" scale="11.4mV"/>
            <reverseRate type="HHExpRate" rate="0.66per_s" midpoint="-49.9mV" scale="-11.4mV"/>
        </gateHHrates>
    </ionChannelHH>

    <!--<gapJunction conductance="0.5nS" id="rod_rod_gap"/>-->

</neuroml>
